# OpenSim document version 30000
InverseKinematicsTool:
  results_directory: ./
  constraint_weight: Inf
  accuracy: 1e-5
  marker_file: ../motion.trc
  time_range: 0.066 7.124
  report_errors: true
  output_motion_file: ik.mot
  report_marker_locations: false
  IKTaskSet:
    IKMarkerTask NUI_SKELETON_POSITION_HIP_CENTER: apply=true weight=1
    IKMarkerTask NUI_SKELETON_POSITION_HIP_RIGHT: apply=true weight=1
    IKMarkerTask NUI_SKELETON_POSITION_HIP_LEFT: apply=true weight=1
    IKMarkerTask NUI_SKELETON_POSITION_KNEE_RIGHT: apply=true weight=1
    IKMarkerTask NUI_SKELETON_POSITION_KNEE_LEFT: apply=true weight=1
    IKMarkerTask NUI_SKELETON_POSITION_ANKLE_RIGHT: apply=true weight=1
    IKMarkerTask NUI_SKELETON_POSITION_ANKLE_LEFT: apply=true weight=1
    IKMarkerTask NUI_SKELETON_POSITION_FOOT_RIGHT: apply=true weight=1
    IKMarkerTask NUI_SKELETON_POSITION_FOOT_LEFT: apply=true weight=1
