# OpenSim document version 30000
MarkerSet:
  Marker NUI_SKELETON_POSITION_HIP_CENTER: pelvis (-0.07 0 0)
  Marker NUI_SKELETON_POSITION_HIP_RIGHT: femur_r (0 0 0)
  Marker NUI_SKELETON_POSITION_HIP_LEFT: femur_l (0 0 0)
  Marker NUI_SKELETON_POSITION_KNEE_RIGHT: tibia_r (0 0 0)
  Marker NUI_SKELETON_POSITION_KNEE_LEFT: tibia_l (0 0 0)
  Marker NUI_SKELETON_POSITION_ANKLE_RIGHT: talus_r (0 0 0)
  Marker NUI_SKELETON_POSITION_ANKLE_LEFT: talus_l (0 0 0)
  Marker NUI_SKELETON_POSITION_FOOT_RIGHT: toes_r (0 0 0)
  Marker NUI_SKELETON_POSITION_FOOT_LEFT: toes_l (0 0 0)
