# OpenSim document version 30000
ScaleTool 3D Lower Limb Model-scaled:
  mass: 41.128 [kg]
  height: -1
  age: -1
  GenericModelMaker:
    model_file: ../model.osim
    marker_set_file: ../markers.xml
  ModelScaler:
    apply: true
    scaling_order: measurements
    marker_file: ../motion.trc
    time_range: 0.065 46.467
    preserve_mass_distribution: false
    MeasurementSet:
      Measurement pelvis: apply=true
        MarkerPair: markers=(NUI_SKELETON_POSITION_HIP_RIGHT NUI_SKELETON_POSITION_HIP_LEFT)
        BodyScale pelvis: axes=(X Y Z)
      Measurement femur: apply=true
        MarkerPair: markers=(NUI_SKELETON_POSITION_HIP_RIGHT NUI_SKELETON_POSITION_KNEE_RIGHT)
        BodyScale femur_r: axes=(X Y Z)
        BodyScale femur_l: axes=(X Y Z)
      Measurement tibia: apply=true
        MarkerPair: markers=(NUI_SKELETON_POSITION_KNEE_RIGHT NUI_SKELETON_POSITION_ANKLE_RIGHT)
        BodyScale tibia_r: axes=(X Y Z)
        BodyScale tibia_l: axes=(X Y Z)
      Measurement calcn: apply=true
        MarkerPair: markers=(NUI_SKELETON_POSITION_ANKLE_RIGHT NUI_SKELETON_POSITION_FOOT_RIGHT)
        BodyScale calcn_r: axes=(X Y Z)
        BodyScale calcn_l: axes=(X Y Z)
  MarkerPlacer:
    apply: true
    marker_file: ../motion.trc
    time_range: 0.065 46.467
    max_marker_movement: -1
    IKTaskSet:
      IKMarkerTask NUI_SKELETON_POSITION_HIP_CENTER: apply=true weight=1
      IKMarkerTask NUI_SKELETON_POSITION_HIP_RIGHT: apply=true weight=1
      IKMarkerTask NUI_SKELETON_POSITION_HIP_LEFT: apply=true weight=1
      IKMarkerTask NUI_SKELETON_POSITION_KNEE_RIGHT: apply=true weight=1
      IKMarkerTask NUI_SKELETON_POSITION_KNEE_LEFT: apply=true weight=1
      IKMarkerTask NUI_SKELETON_POSITION_ANKLE_RIGHT: apply=true weight=1
      IKMarkerTask NUI_SKELETON_POSITION_ANKLE_LEFT: apply=true weight=1
      IKMarkerTask NUI_SKELETON_POSITION_FOOT_RIGHT: apply=true weight=1
      IKMarkerTask NUI_SKELETON_POSITION_FOOT_LEFT: apply=true weight=1
