# OpenSim document version 30000
ScaleTool 3D Full Body Model-scaled:
  mass: 75.1646 [kg]
  height: -1
  age: -1
  GenericModelMaker:
    model_file: ../model.osim
    marker_set_file: ../markers.xml
  ModelScaler:
    apply: true
    scaling_order: measurements
    marker_file: C:/Users/crow/Desktop/KinectModel/FullBody/scale/../motion.trc
    time_range: 0.031 9.888
    preserve_mass_distribution: false
    MeasurementSet:
      Measurement pelvis: apply=true
        MarkerPair: markers=(NUI_SKELETON_POSITION_HIP_CENTER NUI_SKELETON_POSITION_SPINE)
        MarkerPair: markers=(NUI_SKELETON_POSITION_HIP_RIGHT NUI_SKELETON_POSITION_HIP_LEFT)
        BodyScale pelvis: axes=(X Y Z)
      Measurement femur: apply=true
        MarkerPair: markers=(NUI_SKELETON_POSITION_HIP_RIGHT NUI_SKELETON_POSITION_KNEE_RIGHT)
        BodyScale femur_r: axes=(X Y Z)
        BodyScale femur_l: axes=(X Y Z)
      Measurement tibia: apply=true
        MarkerPair: markers=(NUI_SKELETON_POSITION_KNEE_RIGHT NUI_SKELETON_POSITION_ANKLE_RIGHT)
        BodyScale tibia_r: axes=(X Y Z)
        BodyScale tibia_l: axes=(X Y Z)
      Measurement calcn: apply=true
        MarkerPair: markers=(NUI_SKELETON_POSITION_ANKLE_RIGHT NUI_SKELETON_POSITION_FOOT_RIGHT)
        BodyScale calcn_r: axes=(X Y Z)
        BodyScale calcn_l: axes=(X Y Z)
      Measurement humerus: apply=true
        MarkerPair: markers=(NUI_SKELETON_POSITION_SHOULDER_RIGHT NUI_SKELETON_POSITION_ELBOW_RIGHT)
        BodyScale humerus_r: axes=(X Y Z)
        BodyScale radius_r: axes=(X Y Z)
        BodyScale humerus_l: axes=(X Y Z)
        BodyScale radius_l: axes=(X Y Z)
      Measurement ulna: apply=true
        MarkerPair: markers=(NUI_SKELETON_POSITION_ELBOW_RIGHT NUI_SKELETON_POSITION_WRIST_RIGHT)
        BodyScale ulna_r: axes=(X Y Z)
        BodyScale ulna_l: axes=(X Y Z)
      Measurement hand: apply=true
        MarkerPair: markers=(NUI_SKELETON_POSITION_WRIST_RIGHT NUI_SKELETON_POSITION_HAND_RIGHT)
        BodyScale hand_r: axes=(X Y Z)
        BodyScale hand_l: axes=(X Y Z)
      Measurement torso: apply=true
        MarkerPair: markers=(NUI_SKELETON_POSITION_SPINE NUI_SKELETON_POSITION_SHOULDER_CENTER)
        BodyScale torso: axes=(X Y Z)
  MarkerPlacer:
    apply: true
    marker_file: ../motion.trc
    time_range: 0.031 1
    max_marker_movement: -1
    IKTaskSet:
      IKMarkerTask NUI_SKELETON_POSITION_HIP_CENTER: apply=true weight=1
      IKMarkerTask NUI_SKELETON_POSITION_HIP_RIGHT: apply=true weight=1
      IKMarkerTask NUI_SKELETON_POSITION_HIP_LEFT: apply=true weight=1
      IKMarkerTask NUI_SKELETON_POSITION_KNEE_RIGHT: apply=true weight=1
      IKMarkerTask NUI_SKELETON_POSITION_KNEE_LEFT: apply=true weight=1
      IKMarkerTask NUI_SKELETON_POSITION_ANKLE_RIGHT: apply=true weight=1
      IKMarkerTask NUI_SKELETON_POSITION_ANKLE_LEFT: apply=true weight=1
      IKMarkerTask NUI_SKELETON_POSITION_FOOT_RIGHT: apply=true weight=1
      IKMarkerTask NUI_SKELETON_POSITION_FOOT_LEFT: apply=true weight=1
      IKMarkerTask NUI_SKELETON_POSITION_SPINE: apply=true weight=1
      IKMarkerTask NUI_SKELETON_POSITION_SHOULDER_RIGHT: apply=true weight=1
      IKMarkerTask NUI_SKELETON_POSITION_SHOULDER_LEFT: apply=true weight=1
      IKMarkerTask NUI_SKELETON_POSITION_ELBOW_RIGHT: apply=true weight=1
      IKMarkerTask NUI_SKELETON_POSITION_ELBOW_LEFT: apply=true weight=1
      IKMarkerTask NUI_SKELETON_POSITION_WRIST_RIGHT: apply=true weight=1
      IKMarkerTask NUI_SKELETON_POSITION_WRIST_LEFT: apply=true weight=1
      IKMarkerTask NUI_SKELETON_POSITION_HAND_RIGHT: apply=true weight=1
      IKMarkerTask NUI_SKELETON_POSITION_HAND_LEFT: apply=true weight=1
      IKMarkerTask NUI_SKELETON_POSITION_SHOULDER_CENTER: apply=true weight=1
