# OpenSim document version 30000
InverseKinematicsTool:
  results_directory: ./
  constraint_weight: Inf
  accuracy: 1e-5
  marker_file: motion.trc
  time_range: 0.047 12.715
  report_errors: true
  output_motion_file: IK_motion.mot
  report_marker_locations: false
  IKTaskSet:
    IKMarkerTask mPelvis: apply=true weight=1
    IKMarkerTask mHipR: apply=true weight=1
    IKMarkerTask mHipL: apply=true weight=1
    IKMarkerTask mKneeR: apply=true weight=1
    IKMarkerTask mKneeL: apply=true weight=1
    IKMarkerTask mAnkleR: apply=true weight=1
    IKMarkerTask mAnkleL: apply=true weight=1
    IKMarkerTask mToesR: apply=true weight=1
    IKMarkerTask mToesL: apply=true weight=1
