# OpenSim document version 30000
MarkerSet:
  Marker mPelvis: pelvis (-0.07 0 0)
  Marker mHipR: femur (0 0 0)
  Marker mHipL: lfemur (0 0 0)
  Marker mKneeR: tibia (0 0 0)
  Marker mKneeL: ltibia (0 0 0)
  Marker mAnkleR: talus (0 0 0)
  Marker mAnkleL: ltalus (0 0 0)
  Marker mToesR: toes (0 0 0)
  Marker mToesL: ltoes (0 0 0)
