# OpenSim document version 30000
ScaleTool Kinect Lower Limb-scaled:
  mass: 41.128
  height: -1
  age: -1
  GenericModelMaker:
    model_file: Kinect_no_markers.osim
    marker_set_file: kinectMarkers.xml
  ModelScaler:
    apply: true
    scaling_order: measurements
    marker_file: motion.trc
    time_range: 0.046 9.469
    preserve_mass_distribution: false
    MeasurementSet:
      Measurement rfemur: apply=true
        MarkerPair
        BodyScale femur: axes=(X Y Z)
      Measurement lfemur: apply=true
        MarkerPair: markers=(mHipL mKneeL)
        BodyScale lfemur: axes=(X Y Z)
      Measurement rtibia: apply=true
        MarkerPair: markers=(mKneeR mAnkleR)
        BodyScale tibia: axes=(X Y Z)
      Measurement ltibia: apply=true
        MarkerPair: markers=(mKneeL mAnkleL)
        BodyScale ltibia: axes=(X Y Z)
      Measurement rfoot: apply=false
        MarkerPair: markers=(mAnkleR mToesR)
      Measurement lfoot: apply=false
        MarkerPair: markers=(mAnkleL mToesL)
  MarkerPlacer:
    apply: true
    marker_file: motion.trc
    time_range: 0.046 1
    max_marker_movement: -1
    IKTaskSet:
      IKMarkerTask mPelvis: apply=true weight=1
      IKMarkerTask mHipR: apply=true weight=1
      IKMarkerTask mHipL: apply=true weight=1
      IKMarkerTask mKneeR: apply=true weight=1
      IKMarkerTask mKneeL: apply=true weight=1
      IKMarkerTask mAnkleR: apply=true weight=1
      IKMarkerTask mAnkleL: apply=true weight=1
      IKMarkerTask mToesR: apply=true weight=1
      IKMarkerTask mToesL: apply=true weight=1
